# Stage 5 with checkpoints in the transient as well (in.05_field writes them only in
# production).  resume: 0 fresh, 1 production checkpoint restart.<step>, 2 transient
# checkpoint trans.<step>.  Used by field_msu.sbatch when TEMPLATE=in.05_field_ck.
# Stage 5: NVT production with the static planar external potential on the ions.
# The box is already at the mean NPT volume (inherited from stage 4), which is
# what set k_m = 2 pi m / L_z when the potential was generated.
units           lj
atom_style      full
boundary        p p p

variable        T       index 1.0
variable        ntrans  index 1100000    # transient, 10 tau_lambda(8 sigma)
variable        nsteps  index 11000000   # production, 100 tau_lambda(8 sigma)
variable        ndump   index 200        # 1 tau
variable        binw    index 0.1
variable        nrep    index 100        # profile block = 100 tau, fine
                                         # enough to resolve tau_int in field
variable        nblock  equal ${ndump}*${nrep}
variable        resume  index 0          # 1 = continue from a checkpoint
variable        seg     index 0          # segment counter, for the per-segment files
variable        nrst    index 500000     # checkpoint interval (restart.<step>)

read_restart    ${restart}
include         ${ff}
include         ${potfile}               # defines v_fz_cat/v_fz_ani, v_ez_cat/v_ez_ani

# no net momentum: a COM drift adds t^2 to every MSD and survives Nose-Hoover.
# On a resume the momentum is already zero and the checkpoint state must not be
# disturbed, so this is done only on a fresh start.
if "${resume} == 0" then "velocity all zero linear" "reset_timestep 0"

fix             int all nvt temp ${T} ${T} 1.0
timestep        0.005

# --- the external potential --------------------------------------------------
fix             extc cations addforce 0.0 0.0 v_fz_cat energy v_ez_cat
fix             exta anions  addforce 0.0 0.0 v_fz_ani energy v_ez_ani
fix_modify      extc energy yes
fix_modify      exta energy yes

thermo_style    custom step temp epair elong press vol f_extc f_exta
thermo          5000

# --- transient ---------------------------------------------------------------
# A resume re-enters directly in the production phase, at the timestep the
# checkpoint carries; `run ... upto` below then covers only what is left.
# transient with its own checkpoints (trans.<step>): resume = 0 starts it at step 0,
# resume = 2 continues it from a checkpoint; "upto" runs exactly what is left
if "${resume} != 1" then "restart ${nrst} trans.*" "run ${ntrans} upto" "restart 0" "reset_timestep 0"

# --- production --------------------------------------------------------------

compute         ckcat cations chunk/atom bin/1d z lower ${binw} units box
compute         ckani anions  chunk/atom bin/1d z lower ${binw} units box
# one file per segment: a resumed fix cannot append to the previous one
fix             pcat cations ave/chunk ${ndump} ${nrep} ${nblock} ckcat &
                density/number fz v_fz_cat file prof_cat.${seg}.dat
fix             pani anions  ave/chunk ${ndump} ${nrep} ${nblock} ckani &
                density/number fz v_fz_ani file prof_ani.${seg}.dat

# raw ion data: position, total force, and the external force LAMMPS applied
dump            dcat cations custom ${ndump} cat.dump id type x y z fx fy fz v_fz_cat
dump_modify     dcat sort id format line "%d %d %.4f %.4f %.4f %.5g %.5g %.5g %.5g"
dump            dani anions custom ${ndump} ani.dump id type x y z fx fy fz v_fz_ani
dump_modify     dani sort id format line "%d %d %.4f %.4f %.4f %.5g %.5g %.5g %.5g"

# the job script has already cut both dumps back to the checkpoint, so appending
# continues the trajectory without a gap and without repeating a frame
if "${resume} == 1" then "dump_modify dcat append yes" "dump_modify dani append yes"

# acceptance check: the mean ion current must vanish
variable        vzc equal vcm(cations,z)
variable        vza equal vcm(anions,z)
fix             curout all ave/time 200 5 1000 v_vzc v_vza c_thermo_temp c_thermo_press &
                file current.${seg}.dat title2 "# step vcm_z_cat vcm_z_ani temp press"

# checkpoints, so a preempted run (scavenger) resumes instead of starting over
restart         ${nrst} restart.*

run             ${nsteps} upto
write_restart   ${out}
