units lj
atom_style full
region box block 0 20 0 20 0 20
create_box 1 box
create_atoms 1 single 1 1 1
create_atoms 1 single 3 1 1
mass * 1.0
pair_style ${ps}
pair_coeff * * ${pc}
${pm}
run 0 post no
pair_write 1 1 5 r 0.9 1.2 out_${tag}.dat T 0.0 0.0
